λ := 1.5
α := 0.71792
β := 2.42907
ζ := 4.38556
12 - sin(1.1)*4/3.21 - cos(-1.1*0.5)*1.1*3/3.21 = 10.013
y(x) := e^(sqrt(2)*x)
b(x) := -sqrt(2)*e^(-sqrt(2)*x)
integral(cos(α*x), x = 0 .. λ) = 1.22644
f(x) := e^(-sqrt(2)*x)
a(x) := sqrt(2)*e^(sqrt(2)*x)
y(-0.5) = 0.493069
integral(cos(β*x)^2, x = 0 .. λ) = 0.836827
y(1) = 4.11325
a(-0.5) = 0.697304
f(1) = 0.243117
sin(1.1)/3.21 = 0.277635
integral(cos(ζ*x)^2, x = 0 .. λ) = 0.78173
b(-0.5) = -2.86819
a(1)*3 = 17.451
y(1)*4 = 16.453
b(1)*4 + f(1)*3 = -0.645926
cos(-1.1*0.5)*1.1/3.21 = 0.292142
b(1) = -0.343819
